# Constants used:
ε_0 := 8.854187817*10^-12*farad/m
μ_0 := 4*π*10^-7*newton/amp^2
c := 3.0*10^8*m/sec
Z_0 := sqrt(μ_0/ε_0)
Z_0 = 376.73 Ω
λ == c/f*sqrt(μ_r*ε_r)
# *************************  Microstrip Antenna Design ***********************************
f := 2400 MHz
t := 0.062 in
Q := 40
ε_r := 4.5
t = 0.15748 cm
λ_0 := c/f
λ_0 = 12.5 cm
t/λ_0 = 1.25984 %  # should be <1%
# a) find the a and b dimensions
# select b dimension
a_approx := λ_0/2*1/sqrt(ε_r)
a_approx = 2.94628 cm
# let
b := 2.5/3*a_approx
b = 2.45523 cm
# determine "a" dimension
ε_reff := (ε_r + 1)/2 + (ε_r - 1)/2*sqrt(1 + 10*t/b)
ε_reff = 4.99205
Δa := t*(0.412*(ε_reff + 0.3)*(b/t + 0.264)/((ε_reff - 0.258)*(b/t + 0.813)))
Δa = 0.0701019 cm
# The error in ignoring Δa is:
Δa/a_approx = 2.37934 %
# The center frequency resonance error is:
f*Δa/a_approx = 57.1041 MHz
# the corrected length:
a := c/(2*f)*1/sqrt(ε_reff) - Δa
a = 2.72721 cm
# b) find the feed location:
Z := Z_0*sqrt(1/ε_r)
Z = 177.592 Ω
k := 2*π/λ_0*sqrt(ε_r)
k = 106.629 1/m
t = 0.0015748 m
# let
Z_a := 50 Ω
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Z_a == Q*Z*t/(ε_r*k)*ψ^2
ψ == sqrt(2/(a*b))*cos(π*P/a)
Z_a(P) := Q*Z*t/(ε_r*k)*2/(a*b)*cos(π*P/a)^2
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P := .29 cm
Z_a(P) = 62.1505 Ω
# Note: If Za is too small or P is too small, decrease initial b width to increase the Za profile
# maximum directivity :
θ_BE := 2*acos(sqrt(7.03*λ_0^2/((3*a^2 + t^2)*4*π^2)))
θ_BE = 54.6886j deg
k_0 := 2*π/λ_0
k_0 = 50.2655 1/m
θ_BH := 2*acos(sqrt(1/(2 + k_0*b)))
θ_BH = 112.433 deg
(c/(360 MHz))^2*10/(4*π) = 0.552621 m^2
